d := 3.7
r := 1.8723
a := 3.1659
b := 0.0015476
n := 4
-степень*числа
Δd := 0.05
k := 2.7658
Δa := 0.00005
b1 := 0.00154
Δπ := 0.0016
Δr := 0.00001
δa := Δa/|a|
Δb := 0.000001
Δk := 0.00001
Δ := |b - b1| = 7.6e-6
V := d^3*π/6 = 26.5218
δa = 1.57933e-5
Δb1 := Δb + Δ = 8.6e-6
# Абсолютные погрешности:
δa*100 = 0.00157933
Δr + Δk = 2e-5  # для r+k  r-k
δb1 := Δb1/|b1| = 0.00558442
ΔV := |d^3/6|*Δπ + |π*d^2/2|*Δd = 1.08872
|r|*Δk + |r|*Δk = 3.7446e-5  # для r*k
δV := ΔV/|V| = 0.0410498
(|r|*Δk + |r|*Δk)/k^2 = 4.89513e-6  # для r/k
n*r^(n - 1)*Δr = 0.000262534  # для r^n
# Относительные погрешности:
|(Δr + Δk)/(r + k)| = 4.31211e-6  # для r+k
|(Δr + Δk)/(r - k)| = 2.23839e-5  # для r-k
|(|r|*Δk + |r|*Δk)/(r*k)| = 7.23118e-6  # для r*k
|(|r|*Δk + |r|*Δk)/k^2/(r/k)| = 7.23118e-6  # для r/k
|n*r^(n - 1)*Δr/r^n| = 2.13641e-5  # для r^n
