t := [5; 10; 15]
R := [51; 53; 54]
c := 13
linterp(t, R, c) = 53.6
# Полином Лагранжа:
L(a, i1, i2, i3) := R[i3]*((a - t[i1])*(a - t[i2]))/((t[i3] - t[i1])*(t[i3] - t[i2])) + R[i2]*((a - t[i1])*(a - t[i3]))/((t[i2] - t[i1])*(t[i2] - t[i3])) + R[i1]*((a - t[i2])*(a - t[i3]))/((t[i1] - t[i2])*(t[i1] - t[i3]))
L(c, 0, 1, 2) = 53.72
# Полином Ньютона:
R1(i1, i2) := (R[i2] - R[i1])/(t[i2] - t[i1])
R2(i1, i2, i3) := (R1(i1, i2) - R1(i1, i2))/(t[i3] - t[i1])
N(a, i1, i2, i3) := R[i1] + (a - t[i1])*R1(i1, i2) + (a - t[i2])*(a - t[i1])*R2(i1, i2, i3)
N(c, 0, 1, 2) = 54.2
# Канонический полином:
A := [1, 5, 5^2; 1, 10, 10^2; 1, 15, 15^2]
T := A^-1*R
T = [48; 0.7; -0.02]
f(d) := T[0] + T[1]*d + T[2]*d^2
f(c) = 53.72
# Сплайн-интерполяция:
i := 0 .. 1
h[i] := t[i + 1] - t[i]
B := [0; 0]
D := [0; 0]
h = [5; 5]
C := [0; 0]
Given
B[0]*h[0] + C[0]*h[0]^2 + D[0]*h[0]^3 == R[1] - R[0]
B[1]*h[1] + C[1]*h[1]^2 + D[1]*h[1]^3 == R[2] - R[1]
B[1] - B[0] - 2*C[0]*h[0] - 3*D[0]*h[0]^2 == 0
C[1] - C[0] - 3*D[0]*h[0] == 0
C[1] + 3*D[1]*h[1] == 0
C[0] == 0
[B; C; D] := Find(B, C, D)
B = [0.45; 0.3]
C = [0; -0.03]
D = [-0.002; 0.002]
i := 0 .. 1
S := R[i] + B[1]*(t - t[1]) + C[1]*(t - t[1])^2 + D[1]*(t - t[1])^3  # error: This value must be an integer.
d := cspline(t, R)
interp(d, t, R, 13) = 53.656
