# Линейная функция | Степенная функция | Показательная функция
x := [1; 2; 3; 4; 5]
y := [1.1; 1.55; 1.9; 2.25; 2.5]
x := [1; 2; 3; 4; 5]
y := [1.1; 1.55; 1.9; 2.25; 2.5]
x := [1; 2; 3; 4; 5]
y := [1.1; 1.55; 1.9; 2.25; 2.5]
N := length(x) - 1
N := length(x) - 1
N := length(x) - 1
i := 0 .. N
i := 0 .. N
i := 0 .. N
a := slope(x, y)
p := slope(x, vectorize(ln(y)))
p = 0.201464
a = 0.35
k := exp(intercept(vectorize(ln(x)), vectorize(ln(y))))
b := intercept(x, y)
o := exp(intercept(x, vectorize(ln(y))))
b = 0.81
o = 0.97642
yLinear := a*x + b
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m := slope(vectorize(ln(x)), vectorize(ln(y)))
yP(x) := o*exp(p*x)
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k = 1.09357
m = 0.51288
yLinear = [1.16; 1.51; 1.86; 2.21; 2.56]
yS(x) := k*x^m
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yP(x) = [1.19435; 1.46092; 1.78698; 2.18582; 2.67368]
yS(x) = [1.09357; 1.56041; 1.92111; 2.22654; 2.49651]
sum((y - yLinear)^2) = 0.012
sum((y - yP(x))^2) = 0.0638937
sum((y - yS(x))^2) = 0.00115781
# Логарифмическая функция | Гиперболическая функция | Квадратичная функция
x := [1; 2; 3; 4; 5]
y := [1.1; 1.55; 1.9; 2.25; 2.5]
x := [1; 2; 3; 4; 5]
y := [1.1; 1.55; 1.9; 2.25; 2.5]
x := [1; 2; 3; 4; 5]
y := [1.1; 1.55; 1.9; 2.25; 2.5]
N := length(x) - 1
N := length(x) - 1
N := length(x) - 1
yK(x) := [1; x; x^2]
i := 0 .. N
i := 0 .. N
i := 0 .. N
u := slope(vectorize(ln(x)), y)
u = 0.866465
q := slope(1/x, y)
v := linfit(x, y, yK)
q = -1.60652
j := intercept(vectorize(ln(x)), y)
j = 1.03036
w := intercept(1/x, y)
w = 2.59364
yU(x) := v[2]*x^2 + v[1]*x + v[0]
v = [0.61; 0.521429; -0.0285714]
yL(x) := u*ln(x) + j
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yH(x) := if(x == 0, "error", q/x + w)
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yL(x) = [1.03036; 1.63095; 1.98227; 2.23154; 2.42488]
yU(x) = [1.10286; 1.53857; 1.91714; 2.23857; 2.50286]
yH(x) = [0.987124; 1.79038; 2.05814; 2.19201; 2.27234]
sum((y - yL(x))^2) = 0.0241542
sum((y - yU(x))^2) = 0.000571429
sum((y - yH(x))^2) = 0.150724
