# Метод трапеций:
integral(e^x*sin(x), x = 0 .. π/2)
trap(a, b, n, f) :=
    h ← (b - a)/n
    S ← 0
    for j ∈ 1 .. (n - 1)
        x[j] ← a + h*j
        S ← S + f(x[j])
    S ← h*(S + (f(a) + f(b))/2)
    S
f(x) := e^x*sin(x)
rectangle2(a, b, n, f) :=
    h ← (b - a)/n
    S ← 0
    for j ∈ 1 .. n
        x[j] ← a + h*j
        S ← S + f(x[j] - h/2)
    S ← S*h
    S
# Методы прямоугольников:
rectangle(a, b, n, f) :=
    h ← (b - a)/n
    S ← 0
    for j ∈ 1 .. n
        x[j - 1] ← a + h*(j - 1)
        S ← S + f(x[j - 1])
    S ← S*h
    S
trap(0, π/2, 1000, f) = 2.90524
rectangle2(0, π/2, 1000, f) = 2.90524
rectangle(0, π/2, 1000, f) = 2.90146
# Метод Монте-Карло: | Метод Симпсона:
simpson(a, b, n, f) :=
    h ← (b - a)/n
    S1 ← 0
    for j ∈ 1 .. (n/2)
        x[2*j - 1] ← a + h*(2*j - 1)
        S1 ← S1 + f(x[2*j - 1])
    S2 ← 0
    for k ∈ 1 .. (n/2 - 1)
        x[2*k] ← a + h*2*k
        S2 ← S2 + f(x[2*k])
    S ← h/3*(4*S1 + 2*S2 + (f(a) + f(b)))
    S
rectangle1(a, b, n, f) :=
    h ← (b - a)/n
    S ← 0
    for j ∈ 1 .. n
        x[j] ← a + h*j
        S ← S + f(x[j])
    S ← S*h
    S
t := 0, 0.125 .. π/2
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rectangle1(0, π/2, 1000, f) = 2.90902
b := 5
a := 1.5
N := 1000
i := 1 .. N
y[i] := rnd(b)
x[i] := rnd(a)
m[i] := if(y[i] < f(x[i]), 1, 0)
M := sum(m[i], i)
simpson(0, π/2, 1000, f) = 2.90524
M = 365
S := M*a*b/N
S = 2.7375
