f(x) := x^4 - 2*x - 4
x^4 - 2*x - 4 = 0  # error: This variable is undefined.
# Метод дихотомии
dihot(a, b, e) :=
    k ← 0
    while 1
        c ← (a + b)/2
        b ← c if f(c)*f(a) < 0
        a ← c otherwise
        k ← k + 1
        if |a - b| < e
            {
                break
            }
    [c; k]
v := [-4; -2; 0; 0; 1]
polyroots(v) = [-1.1439; -0.249517 - 1.4374i; -0.249517 + 1.4374i; 1.64293]
F(x) := sum(v[i]*x^i, i = 0 .. 4)
v[0] + v[1]*x + v[2]*x^2 + v[3]*x^3 + v[4]*x^4
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dihot(1, 2, 0.001) = [1.64355; 10]
dihot(-2, -1, 0.001) = [-1.14355; 10]
# Метод хорд
horda(a, b, e) :=
    k ← 0
    if f(a) > 0
        while 1
            x ← b
            x1 ← x - f(x)*(x - a)/(f(x) - f(a))
            b ← x1 if f(x1)*f(x) < 0
            a ← x1 otherwise
            k ← k + 1
            if |f(x1)| < e
                {
                    break
                }
    otherwise
        while 1
            x ← a
            x1 ← x - f(x)*(b - x)/(f(b) - f(x))
            b ← x1 if f(x1)*f(x) < 0
            a ← x1 otherwise
            k ← k + 1
            if |f(x1)| < e
                {
                    break
                }
    [x1; k]
horda(-2, -1, 0.001) = [-1.144; 4]
horda(1, 2, 0.001) = [1.64292; 9]
