# Метод Гаусса
A := [2, 0, -1; -1, 3, 1; 1, -1, 4]
b := [-2; 5; 2]
P := augment(A, b)
R := rref(P)
R = [1, 0, 0, -0.535714; 0, 1, 0, 1.17857; 0, 0, 1, 0.928571]
n := cols(R)
x := R[:, n - 1]
x = [-0.535714; 1.17857; 0.928571]
# Метод итерации
b := [-2; 5; 2]
A := [2, 0, -1; -1, 3, 1; 1, -1, 4]
t := 0.09
N := 45
x[:, 0] := [-2; 5; 2]
D := A^0 - t*A
c := t*b
k := 0 .. N
x[:, k + 1] := D*x[:, k] + c
Δx[k] := |x[:, k + 1] - x[:, k]|
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x[:, N + 1] = [-0.535701; 1.17858; 0.928572]
