0.4*x + 5.3*y + x^2*y
F(x, y) := [0.4*x + 5.3*y + x^2*y; cos(y) + 4*x]
cosy + 4*x
W(x, y) := [d/dx(0.4*x + 5.3*y + x^2*y), d/dy(0.4*x + 5.3*y + x^2*y); d/dx(cos(y) + 4*x), d/dy(cos(y) + 4*x)]
N := 5
x[:, 1] := [0; 0]
k := 1 .. N
x[:, k + 1] := x[:, k] - W(x[:, k][0], x[:, k][1])^-1*F(x[:, k][0], x[:, k][1])
Δx[k] := |x[:, k + 1] - x[:, k]|
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x[:, N] = [-0.249957; 0.0186449]
F(x[:, N][0], x[:, N][1]) = [2.1684e-18; 0]
